# [component: outputs X]
ORIGIN := 1
n := rows(X) = 100
x := sort(X) = [
    3.02; 3.11; 3.13; 3.16; 3.22; 3.29; 3.29; 3.32; 3.32; 3.37
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]
x[1] = 3.02
x[n] = 8.89
X[1] = 5.26
IP := x[n] - x[1] = 5.87
q := 0.5
Md := (x[22] + x[23])/2 = 3.795
median(x) = 5.005
xvid := 1/n*sum(x[i], i = 1 .. n) = 5.0659
mean(x) = 5.0659
s2 := 1/n*sum((x[i] - xvid)^2, i = 1 .. n) = 1.59894
sp2 := 1/(n - 1)*sum((x[i] - xvid)^2, i = 1 .. n) = 1.6151
kvantilis(q, imtis) :=
    u ← sort(imtis)
    n ← length(u)
    i ← floor(n*q)
    if floor(n*q) == ceil(n*q)
        u_q ← 0 if i == 0
        u_q ← u[n] if i == n
        u_q ← (u[i] + u[i + 1])/2 otherwise
    u_q ← u[i + 1] otherwise
    u_q
a(q) :=
    (x[n*q] + x[n*q + 1])/2 if (mod(n*q, 2) == 0)
    x[floor(n*q)] otherwise
a(0.5) = 5.005
kvantilis(0.25, X) = 3.905
a(0.25) = 3.89
kvantilis(0.5, X) = 5.005
kvantilis(0.75, X) = 6.18
kvantilis(0.01, X) = 3.065
kvantilis(0.02, X) = 3.12
kvantilis(0.1, X) = 3.375
# Kvartilinis plotas
KP := kvantilis(0.75, X) - kvantilis(0.25, X) = 2.275
sp := sqrt(sp2) = 1.27086
s_vid := sp/sqrt(n) = 0.127086
vk := sp/xvid = 0.250866
m_3 := 1/(n - 1)*sum((x[i] - xvid)^3, i = 1 .. n) = 0.45424
A_s := n/(n - 2)*m_3/sp^3 = 0.22582
skew(X) = 0.22582
m_4 := 1/(n - 1)*sum((x[i] - xvid)^4, i = 1 .. n) = 5.79049
E_k := 1/((n - 2)*(n - 3))*(n*(n + 1)*m_4/sp^4 - 3*(n - 1)^2) = -0.734564
kurt(X) = -0.734564
# Imties dažnis
dazniu_skirstinys(imtis) :=
    u ← sort(imtis)
    i ← 1
    y[i] ← u[i]
    v[i] ← 0
    for elem ∈ u
        (v[i] ← v[i] + 1) if y[i] == elem
        otherwise
            i ← i + 1
            y[i] ← elem
            v[i] ← 1
    augment(y, v)
transpose(dazniu_skirstinys(X)) = [
    3.02, 3.11, 3.13, 3.16, 3.22, 3.29, 3.32, 3.37, 3.38, 3.48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;
    1, 1, 1, 1, 1, 2, 2, 1, 1, 1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]
# Santykinis dažnis
y := dazniu_skirstinys(X)[:, 1]
i := 1 .. length(y)
w := 1/n*dazniu_skirstinys(X)[:, 2]
Σw[i] := sum(w[k], k = 1 .. i)
santykinis_daznis := transpose(augment(y, w))
santykinis_daznis = [
    3.02, 3.11, 3.13, 3.16, 3.22, 3.29, 3.32, 3.37, 3.38, 3.48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;
    0.01, 0.01, 0.01, 0.01, 0.01, 0.02, 0.02, 0.01, 0.01, 0.01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]
# Imties charakteristikos:
# Imties vidurkis
Xvid := mean(X) = 5.0659
# Imties apatinis kvartilis
kvantilis(0.25, X) = 3.905
# Imties viršutinis kvartilis
kvantilis(0.75, X) = 6.18
# Imties mediana
median(X) = 5.005
# Imties moda
mode(X) =  # error: Multimodal - more than one value occurs at the highest frequency.
# Mažiausia reikšmė
min(X) = 3.02
# Didžiausia reikšmė
max(X) = 8.89
# Imties dispersija
S2 := 1/n*sum((x[i] - Xvid)^2, i = 1 .. n) = 1.59894
# Imties standartinis nuokrypis
S := sqrt(S2) = 1.26449
# Empirinė pasiskirstymo funkcija
Fn(z, imtis) :=
    y ← dazniu_skirstinys(imtis)[:, 1]
    n ← length(imtis)
    w ← 1/n*dazniu_skirstinys(imtis)[:, 2]
    k ← length(y)
    u ← 0 if z < y[1]
    for i ∈ 1 .. k - 1
        u ← sum(w[m], m = 1 .. i) if y[i] ≤ z < y[i + 1]
    u ← 1 if y[k] ≤ z
    u
t := x[1] - 1 .. x[n]
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y := dazniu_skirstinys(X)[:, 1]
v := dazniu_skirstinys(X)[:, 2]
i := 1 .. length(y)
Σv[i] := sum(v[k], k = 1 .. i)
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Σw[i] := sum(w[k], k = 1 .. i)
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# Santykinių dažnių histogramos skaičiavimas
N := 1 + 3.322*log(n) = 7.644
N := floor(N) = 7
k := 1 .. N
x[1] = 3.02
x[n] = 8.89
IP := x[n] - x[1] = 5.87
a[1] := floor(x[1]/10)*10 = 0
a[N + 1] := ceil(x[n]/10)*10
a[N + 1] = 10
h := (a[N + 1] - a[1])/N = 1.42857
a[k] := a[1] + (k - 1)*h
v := hist(a, x)
b[k] := a[k] + h/2
v = [0; 0; 34; 31; 34; 0; 1]
a = [0; 1.42857; 2.85714; 4.28571; 5.71429; 7.14286; 8.57143; 10]
# Santykinių dažnių histograma
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# Sprendžiant iš histogramos ir pasiskirstymo funkcijos, darome prielaidą, kad duomenys pasiskirstę
# pagal tolygųjį dėsnį.
#
# Keliame hipotezę:
# H_0: X ~ T(a; b)
# H_a: X nepasiskirstęs pagal T(a; b)
#
# Momentų metodu randame tolygiojo pasiskirstymo nežinomų parametrų a ir b įverčius.
Xvid = 5.0659
S2 = 1.59894
a := (Xvid - sqrt(3*S2)) = 2.87573
b := 2*Xvid - a = 7.25607
a := 0
b := 0
α := 0.05
qt(1 - α/2, n - 1) = 1.98422
qt(α/2, n - 1) = -1.98422
PIxvid := [xvid - sp/sqrt(n)*qt(1 - α/2, n - 1), xvid + sp/sqrt(n)*qt(1 - α/2, n - 1)] = [4.81373, 5.31807]
qchisq(1 - α/2, n - 1) = 128.422
qchisq(α/2, n - 1) = 73.3611
PIs2 := [sp2*(n - 1)/qchisq(1 - α/2, n - 1), sp2*(n - 1)/qchisq(α/2, n - 1)] = [1.24507, 2.17955]
a = 0
a[1] := -∞
a[N + 1] := ∞
a = [-1e307; 0; 0; 0; 0; 0; 0; 1e307]
O := v
sum(O) = 100
F(x) := pnorm(x, xvid, sp)
E[k] := (F(a[k + 1]) - F(a[k]))*n
E = [0.00335719; 0; 0; 0; 0; 0; 99.9966]
sum(E) = 100
χ2_imt := sum((O[i] - E[i])^2/E[i], i = 1 .. N)  # error: Divide by zero.
α := 0.1
χ2_krit := qchisq(1 - α, N - 2 - 1) = 7.77944
# [component: outputs D]
n := rows(D)
N := 7
a[1] := 0
h := 3
i := 1 .. N
a[i + 1] := a[i] + h
b[i] := a[i] + h/2
a[N + 1] := ∞
O := hist(a, D)
m := mean(D)
λ := 1/m
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F(x) := 1 - e^(-λ*x)
E[i] := (F(a[i + 1]) - F(a[i]))*n
E =  # error: This variable is undefined.
χ2_imt := sum((O[i] - E[i])^2/E[i], i = 1 .. N)
α := 0.05
χ2_krit := qchisq(1 - α, N - 1 - 1) = 11.0705
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Fe(x) := □  # error: This placeholder is empty.
